*Heading
** Job name: p1xp05_temp_top_heatflux_bottom Model name: Model-1
** Generated by: Abaqus/CAE 6.13-2
*Preprint, echo=NO, model=NO, history=NO, contact=NO
**
** PARTS
**
*Part, name=domain
*End Part
**
**
** ASSEMBLY
**
*Assembly, name=Assembly
**
*Instance, name=domain-1, part=domain
*Node
      1,           0.,           0.
      2, 0.00999999978,           0.
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*Element, type=DC2D3
  1,  1,  2, 13
  2, 13, 12,  1
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*Nset, nset=_PickedSet2, internal, generate
  1,  66,   1
*Elset, elset=_PickedSet2, internal, generate
   1,  100,    1
** Section: Section-1
*Solid Section, elset=_PickedSet2, material=Material-1
,
*End Instance
**
*Nset, nset=TopEdge, instance=domain-1, generate
 56,  66,   1
*Elset, elset=TopEdge, instance=domain-1, generate
  82,  100,    2
*Elset, elset=_BottomEdge_S1, internal, instance=domain-1, generate
  1,  19,   2
*Surface, type=ELEMENT, name=BottomEdge
_BottomEdge_S1, S1
*End Assembly
**
** MATERIALS
**
*Material, name=Material-1
*Conductivity
 0.6,
** ----------------------------------------------------------------
**
** STEP: Step-1
**
*Step, name=Step-1, nlgeom=NO
*Heat Transfer, steady state, deltmx=0.
1., 1., 1e-05, 1.,
**
** BOUNDARY CONDITIONS
**
** Name: Fixed Type: Temperature
*Boundary
TopEdge, 11, 11, 20.
**
** LOADS
**
** Name: HeatFlux   Type: Surface heat flux
*Dsflux
BottomEdge, S, 2000.
**
** OUTPUT REQUESTS
**
*Restart, write, frequency=0
**
** FIELD OUTPUT: F-Output-1
**
*Output, field, variable=PRESELECT
*Output, history, frequency=0
*End Step
