*HEADING
ABAQUS job created on 25-Oct-12 at 19:21:26
**
*#node, 121
*#element, 200
**
*NODE
       1,            0.,            0.
       2,          0.01,            0.
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**
**
*ELEMENT, TYPE=DS3 , ELSET=MATERIAL1_PROPERTIES
       1,      13,      12,       1
       2,       1,       2,      13
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**
** Material1_Properties
**
*SHELL SECTION, ELSET=MATERIAL1_PROPERTIES, MATERIAL=MATERIAL1
       0.001,       5
**
** Material1
** Date: 25-Oct-12           Time: 18:13:37
**
*MATERIAL, NAME=MATERIAL1
**
*DENSITY
       7860.,
**
*CONDUCTIVITY, TYPE=ISO
         1.,
**
*SPECIFIC HEAT
        450.,
**
** Step  1, Default Heat Transfer Step
** LoadCase, Default
**
*STEP, AMPLITUDE=RAMP, INC=10
Steady State Heat Transfer
**
This load case is the default load case that always appears
*HEAT TRANSFER, STEADY STATE
         0.1,          1.
**
*NSET, NSET=LEFT_TEMPERATURE
		 1,      12,  	  23,	   34,		45,		56,		 67, 	   78,
		89,		100,	 111
*NSET, NSET=RIGHT_TEMPERATURE
		11,     22,       33,	   44,		55,		66,		 77, 	   88,
		99,		110,	 121
*ELSET, ELSET=HEATFLUX_BOTTOM
         2,       3,       6,       7,      10,      11,      14,      15,
        18,       19
*ELSET, ELSET=HEATFLUX_TOP
	   182,		 183,	186,	  187,	   190,	    191,	 194,	  195,
	   198,		 199
*ELSET, ELSET=HEATSOURCE1, GENERATE
       1,     200,       1
**
**
** Left_Temperature
**
*BOUNDARY, OP=NEW
LEFT_TEMPERATURE,  11, 11,     0.
**
** Right_Temperature
**
*BOUNDARY, OP=NEW
RIGHT_TEMPERATURE, 11, 11, 	  0.
**
** HeatFlux_top
**
*DFLUX, OP=NEW
HEATFLUX_TOP, S1,       0.
**
** HeatFlux_bottom
**
*DFLUX, OP=NEW
HEATFLUX_BOTTOM, S1,       0.
**
** HeatSource1
**
*DFLUX, OP=NEW
HEATSOURCE1, BF,         1000.
**
*FILM, OP=NEW
*CFLUX, OP=NEW
**
*NODE PRINT, FREQ=1
NT,
**
*EL PRINT, POS=INTEG, FREQ=0
**
*EL PRINT, POS=NODES, FREQ=0
**
*EL PRINT, POS=CENTR, FREQ=0
**
*EL PRINT, POS=AVERAGE, FREQ=0
**
*MODAL PRINT, FREQ=99999
**
*PRINT, FREQ=1
** NODE OUTPUT REQUESTS
**
*OUTPUT, FIELD, FREQ=1
*NODE OUTPUT
NT,
**
** ELEMENT OUTPUT REQUESTS
** NONE
** MODAL OUTPUT REQUESTS
** NONE
**
*END STEP
