*HEADING
ABAQUS job created on 31-Jul-13 at 14:39:48
**
*NODE
       1,            0.,            0.
       2,      0.000625,            0.
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**
**
*ELEMENT, TYPE=S3R , ELSET=
       1,     163,     162,       1
       2,       1,       2,     163
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**
** Step  1, Default Heat Transfer Step
** LoadCase, Default
**
*STEP, AMPLITUDE=RAMP, INC=10
Steady State Heat Transfer
**
This load case is the default load case that always appears
*HEAT TRANSFER, STEADY STATE
         0.1,          1.
**
*ELSET, ELSET=TOP_FLUX
   50882,   50883,   50886,   50887,   50890,   50891
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*ELSET, ELSET=BOTTOM_FLUX
       2,       3,       6,       7,      10,      11
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**
**
** BOTTOM_TEMP
**
*BOUNDARY, OP=NEW
       2, 11, 11,          0.
       3, 11, 11,          0.
       4, 11, 11,          0.
       5, 11, 11,          0.
       6, 11, 11,          0.
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     160, 11, 11,          0.
**
** TOP_TEMP
**
*BOUNDARY, OP=NEW
   25762, 11, 11,          0.
   25763, 11, 11,          0.
   25764, 11, 11,          0.
   25765, 11, 11,          0.
   25766, 11, 11,          0.
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   25920, 11, 11,          0.
**
** LEFT_TEMP
**
*BOUNDARY, OP=NEW
       1, 11, 11,          0.
     162, 11, 11,          0.
     323, 11, 11,          0.
     484, 11, 11,          0.
     645, 11, 11,          0.
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   25761, 11, 11,          0.
**
** RIGHT_TEMP
**
*BOUNDARY, OP=NEW
     161, 11, 11,          0.
     322, 11, 11,          0.
     483, 11, 11,          0.
     644, 11, 11,          0.
     805, 11, 11,          0.
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   25921, 11, 11,          0.
**
** TOP_FLUX
**
** BOTTOM_FLUX
**
*FILM, OP=NEW
*CFLUX, OP=NEW
**
*NODE PRINT, FREQ=1
NT,
**
*EL PRINT, POS=INTEG, FREQ=0
**
*EL PRINT, POS=NODES, FREQ=0
**
*EL PRINT, POS=CENTR, FREQ=0
**
*EL PRINT, POS=AVERAGE, FREQ=0
**
*MODAL PRINT, FREQ=99999
**
*PRINT, FREQ=1
** NODE OUTPUT REQUESTS
**
*OUTPUT, FIELD, FREQ=1
*NODE OUTPUT
NT,
**
** ELEMENT OUTPUT REQUESTS
** NONE
** MODAL OUTPUT REQUESTS
** NONE
**
*END STEP
