*HEADING
ABAQUS job created on 31-Jul-13 at 14:39:48
**
**
*#node, 25921
*#element, 51200
**
*NODE
       1,            0.,            0.
       2,      0.000625,            0.
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**
**
*ELEMENT, TYPE=S3R , ELSET=
       1,     163,     162,       1
       2,       1,       2,     163
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**
** Material1_Properties
**
*SHELL SECTION, ELSET=MATERIAL1_PROPERTIES, MATERIAL=MATERIAL1
       0.001,       5
**
** Material1
** Date: 25-Oct-12           Time: 18:13:37
**
*MATERIAL, NAME=MATERIAL1
**
*DENSITY
       7860.,
**
*CONDUCTIVITY, TYPE=ISO
         1.,
**
*SPECIFIC HEAT
        450.,
**
** Step  1, Default Heat Transfer Step
** LoadCase, Default
**
*STEP, AMPLITUDE=RAMP, INC=10
Steady State Heat Transfer
**
This load case is the default load case that always appears
*HEAT TRANSFER, STEADY STATE
         0.1,          1.
**
**
*NSET, NSET=LEFT_TEMPERATURE, GENERATE
		 1,  25761, 161
*NSET, NSET=RIGHT_TEMPERATURE, GENERATE
		161,  25921, 161
*ELSET, ELSET=TOP_FLUX
   50882,   50883,   50886,   50887,   50890,   50891
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*ELSET, ELSET=BOTTOM_FLUX
       2,       3,       6,       7,      10,      11
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**
*ELSET, ELSET=HEATSOURCE1, GENERATE
       1,     51200,       1
**
** LEFT_TEMP
**
*BOUNDARY, OP=NEW
LEFT_TEMPERATURE,  11, 11,     0.
**
** RIGHT_TEMP
**
*BOUNDARY, OP=NEW
RIGHT_TEMPERATURE, 11, 11, 	  0.
**
** TOP_FLUX
**
*DFLUX, OP=NEW
TOP_FLUX, S1,       0.
**
** BOTTOM_FLUX
**
*DFLUX, OP=NEW
BOTTOM_FLUX, S1,       0.
**
** HeatSource1
**
*DFLUX, OP=NEW
HEATSOURCE1, BF,         1000.
**
*FILM, OP=NEW
*CFLUX, OP=NEW
**
*NODE PRINT, FREQ=1
NT,
**
*EL PRINT, POS=INTEG, FREQ=0
**
*EL PRINT, POS=NODES, FREQ=0
**
*EL PRINT, POS=CENTR, FREQ=0
**
*EL PRINT, POS=AVERAGE, FREQ=0
**
*MODAL PRINT, FREQ=99999
**
*PRINT, FREQ=1
** NODE OUTPUT REQUESTS
**
*OUTPUT, FIELD, FREQ=1
*NODE OUTPUT
NT,
**
** ELEMENT OUTPUT REQUESTS
** NONE
** MODAL OUTPUT REQUESTS
** NONE
**
*END STEP
