*Heading
** Job name: square_p01_80x80C_abq Model name: Model-1
** Generated by: Abaqus/CAE 6.10-1
*Preprint, echo=NO, model=NO, history=NO, contact=NO
**
** PARTS
**
*Part, name=square
*Node
      1, 0.0493750013, 0.0496391505
      2, 0.0506250001, 0.0496391505
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*Element, type=CPS3
1, 1, 2, 3
    2, 1692,  247,  248
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*Nset, nset=LEFT
   4,   7, 245, 246, 247, 248
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*Elset, elset=LEFT
    2,  107,  109,  162,  594,  605
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*Nset, nset=RIGHT
   5,   6,  87,  88,  89,  90
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*Elset, elset=RIGHT
   40,   64,  296,  387,  393,  407
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*Nset, nset=BOTTOM
  4,  5,  8,  9, 10, 11
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*Elset, elset=BOTTOM
   88,  129,  168,  170,  181,  328
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*Nset, nset=TOP
   6,   7, 166, 167, 168, 169
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*Elset, elset=TOP
   41,  541,  549,  552,  557,  560
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*End Part
**
**
** ASSEMBLY
**
*Assembly, name=Assembly
**
*Instance, name=square-1, part=square
*End Instance
**
*Nset, nset=_PickedSet9, internal, instance=square-1, generate
    1,  6609,     1
*Elset, elset=_PickedSet9, internal, instance=square-1, generate
     1,  12896,      1
*Nset, nset=_PickedSet12, internal, instance=square-1, generate
    1,  6609,     1
*Elset, elset=_PickedSet12, internal, instance=square-1, generate
     1,  12896,      1
*Nset, nset=_PickedSet13, internal, instance=square-1, generate
    1,  6609,     1
*Elset, elset=_PickedSet13, internal, instance=square-1, generate
     1,  12896,      1
*End Assembly
**
** MATERIALS
**
*Material, name=Material-1
*Conductivity
1.,
**
** BOUNDARY CONDITIONS
**
** Name: BC-1 Type: Temperature
*Boundary
_PickedSet12, 11, 11
** ----------------------------------------------------------------
**
** STEP: Step-1
**
*Step, name=Step-1
*Heat Transfer, steady state, deltmx=0.
1., 1., 1e-05, 1.,
**
** BOUNDARY CONDITIONS
**
** Name: BC-2 Type: Temperature
*Boundary
_PickedSet13, 11, 11
**
** LOADS
**
** Name: Load-1   Type: Body heat flux
*Dflux
_PickedSet9, BF, 1000.
**
** OUTPUT REQUESTS
**
*Restart, write, frequency=0
**
** FIELD OUTPUT: F-Output-1
**
*Output, field, variable=PRESELECT
*Output, history, frequency=0
*End Step
