*Heading
** Job name: square_p1_abq_5x5C_temp_all Model name: Model-1
** Generated by: Abaqus/CAE 6.13-2
*Preprint, echo=NO, model=NO, history=NO, contact=NO
**
** PARTS
**
*Part, name=Part-1
*Node
      1, 0.0500000007,     0.061547
      2, 0.0399999991, 0.0442265011
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*Element, type=DC2D3
1, 1, 2, 3
 2, 25,  2,  1
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*Nset, nset=_PickedSet7, internal, generate
  1,  37,   1
*Elset, elset=_PickedSet7, internal, generate
  1,  52,   1
** Section: Section-1
*Solid Section, elset=_PickedSet7, material=Material-1
,
*End Part
**
**
** ASSEMBLY
**
*Assembly, name=Assembly
**
*Instance, name=Part-1-1, part=Part-1
*End Instance
**
*Nset, nset=all_boundary, instance=Part-1-1, generate
  4,  23,   1
*Elset, elset=all_boundary, instance=Part-1-1
  6,  7,  9, 11, 13, 14, 17, 19, 21, 22, 27, 31, 33, 40, 42, 51
*End Assembly
**
** MATERIALS
**
*Material, name=Material-1
*Conductivity
1.,
** ----------------------------------------------------------------
**
** STEP: heat transfer
**
*Step, name="heat transfer", nlgeom=NO
*Heat Transfer, end=PERIOD, deltmx=0.1
1., 1., 1e-05, 1.,
**
** BOUNDARY CONDITIONS
**
** Name: all_boundary Type: Temperature
*Boundary
all_boundary, 11, 11
**
** OUTPUT REQUESTS
**
*Restart, write, frequency=0
**
** FIELD OUTPUT: F-Output-1
**
*Output, field, variable=PRESELECT
*Output, history, frequency=0
*End Step
