*Heading
** Job name: temp_all_semicircle_ro_p041_40k_elems Model name: Model-1
** Generated by: Abaqus/CAE 6.10-1
*Preprint, echo=NO, model=NO, history=NO, contact=NO
**
** PARTS
**
*Part, name=Part-1
*Node
      1, 0.00899999961,           0.
      2, 0.0909999982,           0.
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*Element, type=DC2D3
    1,  2879,     7,     8
    2,  4187,  3831,  3765
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*Nset, nset=TOP
   4,   5, 380, 381, 382, 383
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*Elset, elset=TOP
  172,  349,  350,  373,  431,  929
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*Nset, nset=BOTTOM
   1,   2,   3,   6, 264, 265
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*Elset, elset=BOTTOM
    19,    21,   703,   759,  1477,  3582
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*Nset, nset=LEFT
   5,   6, 579, 580, 581, 582
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*Elset, elset=LEFT
   22,   47,  122,  124,  203,  244
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*Nset, nset=RIGHT
   3,   4, 281, 282, 283, 284
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*Elset, elset=RIGHT
  418,  572,  602,  668,  670,  701
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*Nset, nset=REGION1
     1,     2,     7,     8,     9,    10
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*Elset, elset=REGION1, generate
 19103,  40730,      1
*Nset, nset=REGION2
     1,     2,     3,     4,     5,     6
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*Elset, elset=REGION2, generate
     1,  19102,      1
*Nset, nset=_PickedSet9, internal, generate
     1,  20666,      1
*Elset, elset=_PickedSet9, internal, generate
     1,  40730,      1
** Section: Section-1
*Solid Section, elset=_PickedSet9, material=Material-1
,
*End Part
**
**
** ASSEMBLY
**
*Assembly, name=Assembly
**
*Instance, name=Part-1-1, part=Part-1
*End Instance
**
*Nset, nset=_PickedSet6, internal, instance=Part-1-1
   1,   2,   3,   6, 264, 265
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*Elset, elset=_PickedSet6, internal, instance=Part-1-1
    19,    21,   703,   759,  1477,  3582
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*Nset, nset=_PickedSet7, internal, instance=Part-1-1
   4,   5, 380, 381, 382, 383
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*Elset, elset=_PickedSet7, internal, instance=Part-1-1
  172,  349,  350,  373,  431,  929
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*Nset, nset=_PickedSet8, internal, instance=Part-1-1
   5,   6, 579, 580, 581, 582
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*Elset, elset=_PickedSet8, internal, instance=Part-1-1
   22,   47,  122,  124,  203,  244
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*Nset, nset=_PickedSet9, internal, instance=Part-1-1
   3,   4, 281, 282, 283, 284
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*Elset, elset=_PickedSet9, internal, instance=Part-1-1
  418,  572,  602,  668,  670,  701
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*End Assembly
**
** MATERIALS
**
*Material, name=Material-1
*Conductivity
1.,
** ----------------------------------------------------------------
**
** STEP: Step-1
**
*Step, name=Step-1
*Heat Transfer, end=PERIOD, deltmx=0.1
1., 1., 1e-05, 1.,
**
** BOUNDARY CONDITIONS
**
** Name: BOTTOM Type: Temperature
*Boundary
_PickedSet6, 11, 11
** Name: LEFT Type: Temperature
*Boundary
_PickedSet8, 11, 11
** Name: RIGHT Type: Temperature
*Boundary
_PickedSet9, 11, 11
** Name: TOP Type: Temperature
*Boundary
_PickedSet7, 11, 11
**
** OUTPUT REQUESTS
**
*Restart, write, frequency=0
**
** FIELD OUTPUT: F-Output-1
**
*Output, field, variable=PRESELECT
*Output, history, frequency=0
*End Step
