*Heading
** Job name: temp_all_semicircle_ro_p041_6758_elems Model name: Model-1
** Generated by: Abaqus/CAE 6.13-2
*Preprint, echo=NO, model=NO, history=NO, contact=NO
**
** PARTS
**
*Part, name=Part-1
*Node
      1, 0.00999999978,           0.
      2, 0.0900000036,           0.
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*Element, type=DC2D3
   1,  697,    7,    8
   2, 1057,  995,  936
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*Nset, nset=REGION1
    1,    2,    3,    4,    5,    6
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*Elset, elset=REGION1, generate
    1,  3323,     1
*Nset, nset=REGION2
    1,    2,    7,    8,    9,   10
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*Elset, elset=REGION2, generate
 3324,  6758,     1
*Nset, nset=TOP
   4,   5, 153, 154, 155, 156
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*Elset, elset=TOP
   11,   29,  118,  120,  127,  172
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*Nset, nset=BOTTOM
   1,   2,   3,   6, 107, 108
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*Elset, elset=BOTTOM
    9,  149,  150,  500,  738,  798
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*Nset, nset=LEFT
   5,   6, 232, 233, 234, 235
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*Elset, elset=LEFT
    5,    7,   38,   57,   76,  433
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*Nset, nset=RIGHT
   3,   4, 114, 115, 116, 117
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*Elset, elset=RIGHT
  212,  232,  611,  711,  735,  798
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*End Part
**
**
** ASSEMBLY
**
*Assembly, name=Assembly
**
*Instance, name=Part-1-1, part=Part-1
*End Instance
**
*Nset, nset=TopNodes, instance=Part-1-1
   4,   5, 153, 154, 155, 156
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*Elset, elset=TopNodes, instance=Part-1-1
   11,   29,  118,  120,  127,  172
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*End Assembly
**
** MATERIALS
**
*Material, name=Material-1
*Conductivity
1.,
** ----------------------------------------------------------------
**
** STEP: Thermal
**
*Step, name=Thermal, nlgeom=NO
*Heat Transfer, end=PERIOD, deltmx=0.1
1., 1., 1e-05, 1.,
**
** OUTPUT REQUESTS
**
*Restart, write, frequency=0
**
** FIELD OUTPUT: F-Output-1
**
*Output, field, variable=PRESELECT
*Output, history, frequency=0
*End Step
