*Heading
** Job name: very_wavy_interface Model name: Model-1
** Generated by: Abaqus/CAE 6.10-1
*Preprint, echo=NO, model=NO, history=NO, contact=NO
**
** PARTS
**
*Part, name=Part-1
*Node
      1,  0.100000001, 0.0199999996
      2,           0., 0.0299999993
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*Element, type=DC2D3
 1, 56, 10, 11
 2, 56, 11, 12
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*Nset, nset=_PickedSet3, internal, generate
  1,  77,   1
*Elset, elset=_PickedSet3, internal, generate
   1,  126,    1
*Nset, nset=REGION1
  1,  2,  5,  6,  7,  8
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*Elset, elset=REGION1, generate
  64,  126,    1
*Nset, nset=REGION2
  1,  2,  3,  4,  7,  8
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*Elset, elset=REGION2, generate
  1,  63,   1
*Nset, nset=TOP
  5,  6, 48, 49, 50, 51, 52, 53, 54
*Elset, elset=TOP
  77,  90,  97,  98,  99, 100, 102, 103
*Nset, nset=BOTTOM
  3,  4, 38, 39, 40, 41, 42, 43, 44
*Elset, elset=BOTTOM
 15, 28, 34, 35, 36, 37, 39, 40
*Nset, nset=INNODE
 2,
** Section: Section-1
*Solid Section, elset=_PickedSet3, material=Material-1
,
*End Part
**
**
** ASSEMBLY
**
*Assembly, name=Assembly
**
*Instance, name=Part-1-1, part=Part-1
*End Instance
**
*Nset, nset=_PickedSet4, internal, instance=Part-1-1
  5,  6, 48, 49, 50, 51, 52, 53, 54
*Elset, elset=_PickedSet4, internal, instance=Part-1-1
  77,  90,  97,  98,  99, 100, 102, 103
*Elset, elset=__PickedSurf5_S2, internal, instance=Part-1-1
 15, 28, 35, 37
*Elset, elset=__PickedSurf5_S1, internal, instance=Part-1-1
 34, 36, 39, 40
*Surface, type=ELEMENT, name=_PickedSurf5, internal
__PickedSurf5_S2, S2
__PickedSurf5_S1, S1
*End Assembly
**
** MATERIALS
**
*Material, name=Material-1
*Conductivity
 0.6,
** ----------------------------------------------------------------
**
** STEP: Step-1
**
*Step, name=Step-1
*Heat Transfer, end=PERIOD, deltmx=0.1
1., 1., 1e-05, 1.,
**
** BOUNDARY CONDITIONS
**
** Name: BC-1 Type: Temperature
*Boundary
_PickedSet4, 11, 11, 20.
**
** LOADS
**
** Name: Load-1   Type: Surface heat flux
*Dsflux
_PickedSurf5, S, 2000.
**
** OUTPUT REQUESTS
**
*Restart, write, frequency=0
**
** FIELD OUTPUT: F-Output-1
**
*Output, field, variable=PRESELECT
*Output, history, frequency=0
*End Step
