*HEADING
ABAQUS job created on 25-Oct-12 at 19:21:26
** seed size = 0.0055
*#node, 233
*#element, 410
**
*NODE
      1, 0.0890000015, 0.0254999995
      2, 0.0109999999, 0.0254999995
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**
*ELEMENT, TYPE=DS3 , ELSET=MATERIAL1_PROPERTIES
 1,   10,  293,    9
   2,  292,   10,   11
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**
** Material1_Properties
**
*SHELL SECTION, ELSET=MATERIAL1_PROPERTIES, MATERIAL=MATERIAL1
       0.001,       5
**
** Material1
** Date: 25-Oct-12           Time: 18:13:37
**
*MATERIAL, NAME=MATERIAL1
**
*DENSITY
       7860.,
**
*CONDUCTIVITY, TYPE=ISO
         0.6,
**
*SPECIFIC HEAT
        450.,
**
** Step  1, Default Heat Transfer Step
** LoadCase, Default
**
*STEP, AMPLITUDE=RAMP, INC=10
Steady State Heat Transfer
**
This load case is the default load case that always appears
*HEAT TRANSFER, STEADY STATE
         0.1,          1.
**
*NSET, NSET=TOP_EDGE
   4,   5, 360, 361, 362, 363
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*NSET, NSET=INLET
6
*ELSET, ELSET=BOTTOM_EDGE_S1
17550
*ELSET, ELSET=BOTTOM_EDGE_S2
 15684, 15686, 15729, 15730, 15780, 15798
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*ELSET, ELSET=HEATSOURCE1, GENERATE
       1,     26944,       1
*ELSET, ELSET=REGION1, GENERATE
 3194,  11021,      1
*ELSET, ELSET=REGION2, GENERATE
   1,  3193,     1
*ELSET, ELSET=REGION3, GENERATE
11022,  15658,      1
*ELSET, ELSET=REGION4, GENERATE
 23717,  26944,      1
*ELSET, ELSET=REGION5, GENERATE
 15659,  23716,      1
**
** Top_Temperature
**
*BOUNDARY, OP=NEW
TOP_EDGE, 11, 11, 	  20.
**
** Inlet
**
*BOUNDARY, OP=NEW
INLET, 11, 11, 	  20.
** HeatFlux_bottom
**
*DFLUX, OP=NEW
BOTTOM_EDGE_S1, S1,   2000.
**
*DFLUX, OP=NEW
BOTTOM_EDGE_S2, S2,   2000.
**
** HeatSource1
**
*DFLUX, OP=NEW
HEATSOURCE1, BF,         0.
**
*FILM, OP=NEW
*CFLUX, OP=NEW
**
*NODE PRINT, FREQ=1
NT,
**
*EL PRINT, POS=INTEG, FREQ=0
**
*EL PRINT, POS=NODES, FREQ=0
**
*EL PRINT, POS=CENTR, FREQ=0
**
*EL PRINT, POS=AVERAGE, FREQ=0
**
*MODAL PRINT, FREQ=99999
**
*PRINT, FREQ=1
** NODE OUTPUT REQUESTS
**
*OUTPUT, FIELD, FREQ=1
*NODE OUTPUT
NT,
**
** ELEMENT OUTPUT REQUESTS
** NONE
** MODAL OUTPUT REQUESTS
** NONE
**
*END STEP
